x := -9, -9 + 0.25 .. 9
x := -3*π, -2*π .. 3*π
x := 2
n := 3
f(x) := if(x < 0, e^x*x^3, e^(-x)*x^3)
y := (sqrt(x^3 + n) + cos(|n*x - 1|)^2)/(nthroot(x^5 + sin(x) + n, 4)*cos(π/4*(x + n))) = -1.96255
a := 1
b := 2
c := a*b = 2
f(x) = 1.08268
f(x) := e^(-(|x|/3))*cos(x)
x := -5, -5 + 0.5 .. 5
f(x) := sin(x)
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f(x) = [0.958924; 0.97753; 0.756802; 0.350783; -0.14112; -0.598472; -0.909297; -0.997495; -0.841471; -0.479426; 0; 0.479426; 0.841471; 0.997495; 0.909297; 0.598472; 0.14112; -0.350783; -0.756802; -0.97753; -0.958924]
x = [-5; -4.5; -4; -3.5; -3; -2.5; -2; -1.5; -1; -0.5; 0; 0.5; 1; 1.5; 2; 2.5; 3; 3.5; 4; 4.5; 5]
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x := 7
y := 10
z := -3
p := if(x > y, sin(x) + 3*|y| - z^2, (y + 3)/sqrt(z^2 + 1)*ln(|x + 1|))
p = 8.5485
q := if(x > y and x < 1, cos(x) + 2*|y + 1| - z, (x*y + 3)/sqrt(y^2 + 5))
q = 7.12407
w := if(x < y or y ≥ 10, x^2 + 2*(y*x + 1) - z, (x^-3*y^2 + 3)*sqrt(z^2 + 7))
w = 194
x := -2, -2 + 0.4 .. 2
n := 4
x := -2*π, -2*π + π/4 .. 2*π
g(x) := sqrt(|x|)*sin(x)
X := x
Y := g(x)  # error: Значение должно быть скаляром или вектором.
f(x) := (x^2 - n*x + sin(x))*sqrt(|x - cos(n*x)|)
X = [-6.28319; -5.49779; -4.71239; -3.92699; -3.14159; -2.35619; -1.5708; -0.785398; 0; 0.785398; 1.5708; 2.35619; 3.14159; 3.92699; 4.71239; 5.49779; 6.28319]
a := [3, 5; 2, 6]
f(x) = [174.369; 112.241; 100.517; 54.467; 45.6592; 16.6174; 12.4271; 1.41354; 0; -2.4287; -2.12735; -5.80012; -3.9465; -2.20595; 4.54147; 19.1879; 32.9738]
g(x) = [0; 1.65798; 2.1708; 1.40125; 0; -1.0854; -1.25331; -0.626657; 0; 0.626657; 1.25331; 1.0854; 0; -1.40125; -2.1708; -1.65798; 0]
a[0, 0] = 3
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a[:, 0] = [3; 2]
a := 3
b := 2
x := if(a > b, a + b, a*b)
x = 5
