x := -5 .. 5
f(x) := x^2 + ((x - 2)*sin(x)) - 5
root(f(x), x) = [-1.32936; -1.32936; -1.32936; -1.32936; -1.32936; -1.32936; 2.19967; 2.19967; 2.19967; 2.19967; 2.19967]
x := -1.329
f(x) = -0.00160155
x := 2.2
f(x) = 0.00169928
