n := 5
A := [n, n + 1, n + 2; n - 3, n - 2, n; n - 1, n, n + 1]
A = [5, 6, 7; 2, 3, 5; 4, 5, 6]
B := [6*n + 8; 6*n - 7; 6*n + 2]
B = [38; 23; 32]
[x; y; z] := A^-1*B = [1; 2; 3]
X := [x; y; z]
5*1 + 6*2 + 7*3 = 38
X = [1; 2; 3]
2*1 + 3*2 + 5*3 = 23
4*1 + 5*2 + 6*3 = 32
Given
n*x + (n + 1)*y + (n + 2)*z == 6*n + 8
X := Find(x, y, z)
(n - 3)*x + (n - 2)*y + nz == 6*n - 7
(n - 1)*x + ny + (n + 1)*z == 6*n + 2
X = [1; 2; 3]
