x^2/81 + y^2/16 = 1  # error: Эта переменная не определена.
(x - 9)^2 + (y - 2)^2 = 25  # error: Эта переменная не определена.
t1(x) := 2 + sqrt(25 - (x - 9)^2)
f1(x) := 4*sqrt(1 - x^2/81)
t2(x) := 2 - sqrt(25 - (x - 9)^2)
f2(x) := -4*sqrt(1 - x^2/81)
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x1 := 7.16
x2 := 4.25
y1 := -2.6491
y2 := 3.5259
x1^2/81 + y1^2/16 = 1.07152
(x1 - 9)^2 + (y1 - 2)^2 = 24.9997
(x2 - 9)^2 + (y2 - 2)^2 = 24.8909
x2^2/81 + y2^2/16 = 0.999992
x := 1
y := 1
Given
(x^2/81 + y^2/16) == 1
((x - 9)^2 + (y - 2)^2) == 25
A := Find(x, y)
A = [4.23934; 3.52845]
x := 7
y := -1
Given
(x^2/81 + y^2/16) == 1
((x - 9)^2 + (y - 2)^2) == 25
A := Find(x, y)
A = [6.9308; -2.55175]
