n := 2
a := -3*n
b := 3*n
A := runif(3, a, b)
B := runif(3, a, b)
C := runif(3, a, b)
B = [-1.7963; 3.87405; -3.91045]
A = [-5.98478; -3.68012; 1.02007]
C = [2.52594; -2.35217; -4.90306]
A[0]*B[0] + A[1]*B[1] + A[2]*B[2] = -7.49547
s := A*B = -7.49547
V := B×C = [-28.1928; -18.685; -5.56044]
H := [B[1]*C[2] - B[2]*C[1]; B[2]*C[0] - B[0]*C[2]; B[0]*C[1] - B[1]*C[0]] = [-28.1928; -18.685; -5.56044]
w := (A×B)*C = 231.818
Q := [A[1]*B[2] - A[2]*B[1]; A[2]*B[0] - A[0]*B[2]; A[0]*B[1] - A[1]*B[0]] = [10.4391; -25.2356; -29.796]
Q[0]*C[0] + Q[1]*C[1] + Q[2]*C[2] = 231.818
dA := sqrt(A[0]^2 + A[1]^2 + A[2]^2) = 7.0994
dB := sqrt(B[0]^2 + B[1]^2 + B[2]^2) = 5.79022
dC := sqrt(C[0]^2 + C[1]^2 + C[2]^2) = 5.99609
Array := [dA; dB; dC]
MaxValue := max(Array) = 7.0994
Result :=
    "Это А" if MaxValue == dA
    "Это В" if MaxValue == dB
    "Это С" if MaxValue == dC
Result = "Это А"
n := 11
M[n, n] :=
    for i ∈ 0 .. (n - 1)
        for j ∈ 0 .. (n - 2)
            M[i, j] ← round(-10 + rnd(20))
    M[n - 1, n - 1] ← 25
M = [
    -10, -6, 2, -3, 6, -7, 4, -4, -8, -7, 0, 0;
    10, -8, -10, 1, 2, -7, -1, -9, 6, 0, 0, 0;
    8, 9, 1, -1, 7, 6, 10, 2, -5, 7, 0, 0;
    -2, 4, -10, -4, 2, 7, 0, 5, -1, 5, 0, 0;
    2, 5, 1, -7, -1, 0, 5, -7, 0, 4, 0, 0;
    -7, -7, 4, -1, 9, -7, 6, -6, 6, -7, 0, 0;
    5, -4, 4, 4, -8, 7, 0, -1, 9, 1, 0, 0;
    -1, 7, -1, 10, 5, -6, 7, 0, -9, 1, 0, 0;
    1, 7, 3, 7, -8, -4, -4, -7, 7, 2, 0, 0;
    -5, -10, 6, -6, 1, -8, 5, 1, -1, 4, 0, 0;
    -1, 2, 3, 0, 4, -6, -6, -1, -8, -8, 25, 0;
    0, 0, 0, 0, 0, 0, 0, 0, 0, 0, 0, 25
]
sum1 :=
    for i ∈ 0 .. (n - 1)
        for j ∈ 0 .. (n - 1)
            sum ← sum + M[i, j]
sum1 = 18
sum2 :=
    for i ∈ 0 .. (n - 1)
        for j ∈ 0 .. (n - 1)
            sum ← sum + M[i, j] if M[i, j] > 0
sum2 = 284
sum3 :=
    for i ∈ 0 .. (n - 1)
        for j ∈ 0 .. (n - 1)
            sum ← sum + M[i, j] if M[i, j] < 0
sum3 = -266
X :=
    for i ∈ 0 .. n - 1
        X[i] ← M[i, 0]
X = -1
Y :=
    for i ∈ 0 .. n - 1
        X[i] ← M[n - 1, i]
Y = 25
X*Y = -25
