x := -3 .. 3
q(x) := e^(-x^2)
d/dx(q(x)) = [0.000740459; 0.0732626; 0.735759; 0; -0.735759; -0.0732626; -0.000740459]
q(x) = [0.00012341; 0.0183156; 0.367879; 1; 0.367879; 0.0183156; 0.00012341]
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