f(x) := sqrt(|x|)*sin(π*x)
x1 := -6
x2 := 6
deltaX := 0.1
# Область окна Windows
Xlw := 100
Ylw := 200
Xhw := 800
Yhw := 900
N := round((x2 - x1)/deltaX) = 120
i := 0 .. N
X[i] := x1 + i*deltaX  # Количество точек на график
Y[i] := f(X[i])
Z[i] := 1
Y = [
    0; 0.7506; 1.41557; 1.9315; 2.25061; 2.34521; 2.21006; 1.8625; 1.34036; 0.697859
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]
X = [
    -6; -5.9; -5.8; -5.7; -5.6; -5.5; -5.4; -5.3; -5.2; -5.1
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]
# Область отображения в мировой системе координат
Z = [
    1; 1; 1; 1; 1; 1; 1; 1; 1; 1
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]
Xl := min(X) = -6
Xh := max(X) = 6
Yl := min(Y) = -2.34521
Yh := max(Y) = 2.34521
M := stack(transpose(X), transpose(Y), transpose(Z))  # Вектор с начальными значениями
deltaXw := Xhw - Xlw = 700
deltax := Xh - Xl = 12
deltaYw := Yhw - Ylw = 700
deltay := Yh - Yl = 4.69042
ky := deltaYw/deltay = 149.241
kx := deltaXw/deltax = 58.3333
# Матрица пересчетов из МСК в ОСК
M = [
    -6, -5.9, -5.8, -5.7, -5.6, -5.5, -5.4, -5.3, -5.2, -5.1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;
    0, 0.7506, 1.41557, 1.9315, 2.25061, 2.34521, 2.21006, 1.8625, 1.34036, 0.697859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;
    1, 1, 1, 1, 1, 1, 1, 1, 1, 1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]
Tsw := [kx, 0, Xlw - kx*Xl; 0, -ky, Yhw + ky*Yl; 0, 0, 1]
Mw := Tsw*M
Tsw = [58.3333, 0, 450; 0, -149.241, 550; 0, 0, 1]
Mw = [
    100, 105.833, 111.667, 117.5, 123.333, 129.167, 135, 140.833, 146.667, 152.5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;
    550, 437.98, 338.739, 261.742, 214.118, 200, 220.17, 272.04, 349.965, 445.851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;
    1, 1, 1, 1, 1, 1, 1, 1, 1, 1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]
Xw := transpose(Mw)[:, 0]
Yw := transpose(Mw)[:, 1]
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